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/batch
! ANSYS input file written by Workbench version 2026 R1
! File used for geometry attach: C:\Users\widad elyamani\Downloads\intial design simulation_files\dp0\SYS\DM\SYS.agdb
/title,intial design simulation--Static Structural (A5)
/com,--- Data in consistent MKS units. See Solving Units in the help system for more information.
/units,MKS
/prep7
! Turn off shape checking because checks already performed inside WB mesher.
! See help system for more information.
SHPP,OFF,,NOWARN
etcon,set             ! allow ANSYS to choose best KEYOP's for 180x elements, resets any applicable keyopt to MAPDL defaults
/com,*********** Send User Defined Coordinate System(s) ***********
csys,0
/com,*********** Nodes for the whole assembly ***********
nblock,3,,27824
(1i9,3e20.9e3)
        1     0.000000000E+00    -1.415287291E-02     0.000000000E+00
        2     0.000000000E+00     1.415287291E-02     0.000000000E+00
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-1
/com,*********** Elements for Body 1 'PRT0001' ***********
et,1,187
MAT,1 $ TYPE,1 $ REAL,1 $ SECNUM,1 $ ESYS,0    ! ELEMNODES = 10
eblock,21,COMPACT,,15598
(21i9)
        1     1993     3768     2193     2746    16503    17719    16499    16502    21387    17717
        2     1993     2193     3768     2690    16499    17719    16503    16501    17715    21053
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-1
secnum,1    ! reset the section ID to default
toffst,273.15,      ! Temperature offset from absolute zero
/com,*********** Set Reference Temperature ***********
tref,22.
/com,*********** Send Materials ***********
MP,DENS,1,2800,	! kg m^-3
MP,EX,1,73050000000,	! Pa
MP,NUXY,1,0.33,

!************************* Model Summary ********************
! PRT0001,	Al 7075,	matid,	1
!************************* End Model Summary ********************
/com,*********** Fixed Supports ***********
CMBLOCK,_FIXEDSU,NODE,     2351
(8i10)
        75      -146       384     -1547      1640     -1661      1960     -1974
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cmsel,s,_FIXEDSU
d,all,all
nsel,all
/com,*********** Define Force Without Surface Effect Elements "Force" ***********
local,12,0,0.,0.,0.,0.,0.,0.
csys,0
CMBLOCK,_CM28_1 ,ELEM,        4
(8i10)
       781      2467      3404     13400
CMBLOCK,_CM28_2 ,ELEM,       11
(8i10)
       783      2009      2217      2218      2272      7737      7751     13422
     15170     15229     15428
CMBLOCK,_CM28_3 ,ELEM,        6
(8i10)
      1852      1858      1860      1862      1873      1887
CMBLOCK,_CM28_4 ,ELEM,        7
(8i10)
      1851      2213      2251      2260      3649      7736      7750
fini
/com,****************************************************************************
/com,*************************    SOLUTION       ********************************
/com,****************************************************************************
/solu
antype,0                   ! static analysis
_thickRatio=  1     ! Ratio of thick parts in the model
eqsl,pcg,1e-8,,,,,,1
cntr,print,1               ! print out contact info and also make no initial contact an error
cncheck,dmp		!	Enable program controlled contact splitting for distributed memory parallel run
dmpoption,emat,no             ! Don't combine emat file for DANSYS
dmpoption,esav,no             ! Don't combine esav file for DANSYS
nldiag,cont,iter           ! print out contact info each equilibrium iteration
rescontrol,,none                 ! Do not keep any restart files
/com,****************************************************
/com,******************* SOLVE FOR LS 1 OF 1 ****************
/com,*********** Set Force Without Surface Effect Elements "Force" ***********
sfco,1,0,12,,,,,1   ! set and send X component values
sfe,_CM28_1,1,pres,1,0.
sfe,_CM28_2,2,pres,1,0.
sfe,_CM28_3,3,pres,1,0.
sfe,_CM28_4,4,pres,1,0.
sfco,1,1,12,,,,,1   ! set and send Y component values
sfe,_CM28_1,1,pres,1,0.
sfe,_CM28_2,2,pres,1,0.
sfe,_CM28_3,3,pres,1,0.
sfe,_CM28_4,4,pres,1,0.
sfco,1,2,12,,,,,1   ! set and send Z component values
sfe,_CM28_1,1,pres,1,-1183181.06719894
sfe,_CM28_2,2,pres,1,-1183181.06719894
sfe,_CM28_3,3,pres,1,-1183181.06719894
sfe,_CM28_4,4,pres,1,-1183181.06719894
nsel,all
esel,all
sfco,none		! resets the sfcontrol
nsub,1,1,1
time,1.
outres,erase
outres,all,none
outres,nsol,all,
outres,rsol,all
outres,eangl,all
outres,etmp,all
outres,veng,all
outres,strs,all,
outres,epel,all,
outres,eppl,all,
outres,cont,all,
! *********** WB SOLVE COMMAND ***********
! check interactive state
*get,ANSINTER_,active,,int
*if,ANSINTER_,ne,0,then
/eof
*endif
solve
/com *************** Write FE CONNECTORS *********
CEWRITE,file,ce,,INTE
/com,****************************************************
/com,*************** FINISHED SOLVE FOR LS 1 *************
fini
*get,_NSOLTHREADS,active,0,ntfs
*get,_NSOLPROCESSES,active,0,npfs
*get,_PCGITER,active,,solu,cgiter
/post1
fini
